*Heading
** Job name: Job-1 Model name: Model-1
** Generated by: Abaqus/CAE 2016
*Preprint, echo=NO, model=NO, history=NO, contact=NO
**
** PARTS
**
*Part, name=central_shaft
*Node
      1,         66.5,           7.,   3.79999995
      2,         76.5,           7.,   3.79999995
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*Element, type=C3D4
    1, 2540, 2541, 2542, 2543
    2, 2544, 2545, 2546, 2540
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*Nset, nset=Set-1, generate
    1,  7888,     1
*Elset, elset=Set-1, generate
     1,  39771,      1
** Section: Section-1
*Solid Section, elset=Set-1, material=Material-1
,
*End Part
**
*Part, name=central_shaft-Copy
*Node
      1,          50.,   4.00781298,  -14.9573612
      2,          50.,   5.92585278,  -14.3062744
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*Element, type=C3D6
 1,   76,   66,   19,  166,  156,  109
 2,   40,   73,   28,  130,  163,  118
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*Element, type=C3D8R
 79,    7,   65,   75,   42,   97,  155,  165,  132
 80,   30,   75,   65,   17,  120,  165,  155,  107
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*Nset, nset=Set-1, generate
    1,  1260,     1
*Elset, elset=Set-1, generate
   1,  624,    1
** Section: Section-1
*Solid Section, elset=Set-1, material=Material-1
,
*End Part
**
**
** ASSEMBLY
**
*Assembly, name=Assembly
**
*Instance, name=central_shaft-1, part=central_shaft
*End Instance
**
*Instance, name=central_shaft-Copy-1, part=central_shaft-Copy
*End Instance
**
*Node
      1,         104.,  -6.73555729e-16,           0.
*Node
      2,           0.,  6.73555729e-16,           0.
*Node
      3,         37.5,   15.2846355,         1.75
*Node
      4,   71.8000031,           0.,           0.
*Node
      5,         37.5,  9.48182763e-16,           0.
*Nset, nset=Set-4
 1,
*Nset, nset=Set-5
 2,
*Nset, nset=Set-7
 4,
*Nset, nset=Set-9
 3,
*Nset, nset=Set-10
 3,
*Nset, nset=Set-11
 3,
*Nset, nset=Set-12
 4,
*Nset, nset=m_Set-1
 1,
*Nset, nset=m_Set-2
 2,
*Nset, nset=m_Set-3
 3,
*Nset, nset=m_Set-6
 4,
*Elset, elset=_Surf-7_S3, internal, instance=central_shaft-1
  4432,  5501,  5525,  6559,  7318,  7566
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*Elset, elset=_Surf-7_S1, internal, instance=central_shaft-1
 8369,
*Surface, type=ELEMENT, name=Surf-7
_Surf-7_S3, S3
_Surf-7_S1, S1
*Elset, elset=_Surf-8_S4, internal, instance=central_shaft-1
 3832,
*Elset, elset=_Surf-8_S3, internal, instance=central_shaft-1
  3860,  4047,  7485,  8397,  8415,  8526
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*Elset, elset=_Surf-8_S1, internal, instance=central_shaft-1
 15978,
*Elset, elset=_Surf-8_S2, internal, instance=central_shaft-1
 26831,
*Surface, type=ELEMENT, name=Surf-8
_Surf-8_S4, S4
_Surf-8_S3, S3
_Surf-8_S2, S2
_Surf-8_S1, S1
*Elset, elset=_m_Surf-4_S5, internal, instance=central_shaft-Copy-1
  79,  82,  85,  86,  89,  90
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*Elset, elset=_m_Surf-4_S3, internal, instance=central_shaft-Copy-1
  80,  81,  84,  95,  96, 101
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*Elset, elset=_m_Surf-4_S6, internal, instance=central_shaft-Copy-1
  83,  87,  88,  92,  94, 104
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*Elset, elset=_m_Surf-4_S4, internal, instance=central_shaft-Copy-1
  91,  97,  98,  99, 103, 106
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*Surface, type=ELEMENT, name=m_Surf-4
_m_Surf-4_S5, S5
_m_Surf-4_S3, S3
_m_Surf-4_S6, S6
_m_Surf-4_S4, S4
*Elset, elset=_s_Surf-1_S3, internal, instance=central_shaft-1
  1375,  1386,  1940,  3767,  3821,  3924
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*Elset, elset=_s_Surf-1_S2, internal, instance=central_shaft-1
  3907,  4606,  4634,  4902,  4989,  5898
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*Elset, elset=_s_Surf-1_S4, internal, instance=central_shaft-1
  3965,  4967,  5003,  5051,  5754,  6225
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*Elset, elset=_s_Surf-1_S1, internal, instance=central_shaft-1
  4700,  4715,  4856,  4889,  4931,  5045
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*Surface, type=ELEMENT, name=s_Surf-1
_s_Surf-1_S3, S3
_s_Surf-1_S2, S2
_s_Surf-1_S4, S4
_s_Surf-1_S1, S1
*Elset, elset=_s_Surf-2_S3, internal, instance=central_shaft-1
    15,   164,   202,   235,   250,   285
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*Elset, elset=_s_Surf-2_S2, internal, instance=central_shaft-1
   809, 15774, 16206, 16238, 17607, 17658, 17942, 17986, 18502
*Elset, elset=_s_Surf-2_S4, internal, instance=central_shaft-1
   240,   402,  1482, 13736, 16218, 16247
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*Elset, elset=_s_Surf-2_S1, internal, instance=central_shaft-1
 12658, 15767, 18402, 18498, 18513, 19185, 19282, 23864, 25089, 34962
*Surface, type=ELEMENT, name=s_Surf-2
_s_Surf-2_S3, S3
_s_Surf-2_S2, S2
_s_Surf-2_S4, S4
_s_Surf-2_S1, S1
*Elset, elset=_s_Surf-3_S5, internal, instance=central_shaft-Copy-1
  95,  96, 137, 138, 179, 180
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*Surface, type=ELEMENT, name=s_Surf-3
_s_Surf-3_S5, S5
*Elset, elset=_s_Surf-4_S3, internal, instance=central_shaft-1
   964,  1044,  1112,  1318,  1464,  1524
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*Elset, elset=_s_Surf-4_S1, internal, instance=central_shaft-1
   973,  7246,  7480, 10618, 12439, 12924
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*Elset, elset=_s_Surf-4_S4, internal, instance=central_shaft-1
   981,  4162,  4223,  5812,  5987,  7781
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*Elset, elset=_s_Surf-4_S2, internal, instance=central_shaft-1
  4204,  4207,  4680,  5071,  6042, 10702
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*Surface, type=ELEMENT, name=s_Surf-4
_s_Surf-4_S3, S3
_s_Surf-4_S1, S1
_s_Surf-4_S4, S4
_s_Surf-4_S2, S2
*Elset, elset=_s_Surf-6_S3, internal, instance=central_shaft-1
  1252,  1756,  2402,  3763,  3764,  3797
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*Elset, elset=_s_Surf-6_S2, internal, instance=central_shaft-1
 3989, 5385, 5525, 5748, 7382, 7471, 7672, 7790, 8456, 8711, 9579
*Elset, elset=_s_Surf-6_S4, internal, instance=central_shaft-1
  4024,  4374,  4456,  5214,  5840,  7459
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*Elset, elset=_s_Surf-6_S1, internal, instance=central_shaft-1
  5533,  7353,  7401,  7440,  7473,  7585
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*Surface, type=ELEMENT, name=s_Surf-6
_s_Surf-6_S3, S3
_s_Surf-6_S2, S2
_s_Surf-6_S4, S4
_s_Surf-6_S1, S1
*Nset, nset="_T-central_shaft-Copy-1-Datum csys-1", internal
Set-11,
*Transform, nset="_T-central_shaft-Copy-1-Datum csys-1"
          0., -0.99350929997198, -0.113750915904823, 0.968726235559925, 0.0282252402284716, -0.246521431830868
** Constraint: Constraint-1
*Coupling, constraint name=Constraint-1, ref node=m_Set-1, surface=s_Surf-1
*Distributing, weighting method=UNIFORM
** Constraint: Constraint-2
*Coupling, constraint name=Constraint-2, ref node=m_Set-2, surface=s_Surf-2
*Distributing, weighting method=UNIFORM
** Constraint: Constraint-3
*Coupling, constraint name=Constraint-3, ref node=m_Set-3, surface=s_Surf-3
*Distributing, weighting method=UNIFORM
** Constraint: Constraint-4
*Tie, name=Constraint-4, adjust=yes
s_Surf-4, m_Surf-4
** Constraint: Constraint-5
*Coupling, constraint name=Constraint-5, ref node=m_Set-6, surface=s_Surf-6
*Distributing, weighting method=UNIFORM
*End Assembly
**
** MATERIALS
**
** 16MnCr5
*Material, name=Material-1
*Density
7850.,
*Elastic
 2.1e+11, 0.33
** ----------------------------------------------------------------
**
** STEP: Step-1
**
*Step, name=Step-1, nlgeom=NO
*Static
1., 1., 1e-05, 1.
**
** BOUNDARY CONDITIONS
**
** Name: BC-1 Type: Displacement/Rotation
*Boundary
Set-4, 1, 1
Set-4, 2, 2
Set-4, 3, 3
** Name: BC-3 Type: Displacement/Rotation
*Boundary
Set-5, 2, 2
Set-5, 3, 3
** Name: BC-4 Type: Displacement/Rotation
*Boundary
Set-11, 2, 2
**
** LOADS
**
** Name: Load-1   Type: Pressure
*Dsload
Surf-7, P, 1.0997e+08
** Name: Load-2   Type: Pressure
*Dsload
Surf-8, P, 1.48032
** Name: Load-3   Type: Concentrated force
*Cload
Set-12, 2, 288.21
**
** OUTPUT REQUESTS
**
*Restart, write, frequency=0
**
** FIELD OUTPUT: F-Output-1
**
*Output, field, variable=PRESELECT
**
** HISTORY OUTPUT: H-Output-1
**
*Output, history, variable=PRESELECT
*End Step
